# константы | данные
t := 50
F_tr := 498  # сила травления
# [component: outputs data]
f_n := 119.4*10^-4
f_st := f_n
data = [
    ""a"", ""N50"", ""N-50"", ""x"";
    0, 183.5, 184.7, 0;
    10, 140.4, 144.7, 7.4;
    30, 79.3, 100.5, 27;
    50, 33.7, 74, 52;
    70, -2.6, 52.1, 80.6;
    80, -15.8, 40.8, 95.6;
    85, -22.2, 34.9, 103;
    95, -35.3, 21.8, 117.5
]
f_sl := 143.1*10^-4
f_p := f_sl
k := f_sl/f_n = 1.19849
# подсчет коэффициентов для Qn
# вспомогательные функции
a_50 := -10^-2*(22.38*f_n + f_sl*k^2*(352.75 + 21.99)) = -0.0796987
z(x, y) := 0
b_50 := -10*(f_n + 0.525*k*f_sl) = -0.20944
c_50(Ni) := 10^4*(198.4*f_n - 1.96*f_sl) - Ni*100 - F_tr
x(a, b, c) := [(-b + sqrt(b^2 - 4*a*c))/(2*a); (-b - sqrt(b^2 - 4*a*c))/(2*a)]
c_50(-35.3) = 26440.5
a__50 := -10^-2*(5.948*f_n + (44.28 + 808.5)*k^2*f_sl) = -0.175996
xmax(a, b, c) :=
    tmp ← x(a, b, c)
    tmp ← max(tmp[0], tmp[1])
b__50 := -10^1*(102.4*f_n + 78.8*k*f_sl) = -25.7411
c__50(Ni) := 10^4*(189.9*f_n - 9.13*f_sl) - Ni*100 - F_tr
createResultMatrix(data) :=
    res ← matrix(rows(data), 9, z)
    tmp ← ["Angle"; "Pnas"; "Pn"; "Psl"; "Qn"; "Qsl"; "x'"; "t"; "M"]
    i ← 0
    while i < cols(res)
        res[0, i] ← tmp[i]
        i ← i + 1
    res
c__50(21.8) = 18689.6
# функции рассчета
calcP_kp1(Qn, t) :=
    205.2*10^5 - 0.519*10^8*Qn + 0.326*10^11*Qn^2 if t > 0
    205.3*10^5 - 17*10^8*Qn + 0.652*10^11*Qn^2 otherwise
calcP_nas(Qn, Pn, t) :=
    Pn + 0.211*10^8*Qn + 20*10^11*Qn^2 + 1.483*10^5 if t > 0
    Pn + 7*10^5 + 31.7*10^8*Qn + 32.1*10^11*Qn^2 + 24.3*10^5 otherwise
calcDp(Qsl, t, angle) :=
    7280.23*10^11*Qsl^2/4 if t > 0 and (angle ≥ 85 and angle ≤ 95)
    8718.04*10^11*Qsl^2/4 if t < 0 and (angle ≥ 85 and angle ≤ 95)
    0 otherwise
calcX(Qn) := Qn/(2*f_n)
calcT(xcol, x_col, i) := sum(xcol[j], j = 1 .. i)/i/(sum(x_col[j], j = 1 .. i)/i)
calcQn(N_p, N_n, t) :=
    xmax(a_50, b_50, c_50(N_p)) if t > 0
    xmax(a__50, b__50, c__50(N_n)) otherwise
calcQsl(Qn) := Qn*k
calcP_st(Qsl, t, angle) :=
    1.96*10^5 + 0.212*10^8*Qsl + 21.5*10^11*Qsl^2 + calcDp(Qsl, t, angle) if t > 0
    9.13*10^5 + 31.65*10^8*Qsl + 43.3*10^11*Qsl^2 + calcDp(Qsl, t, angle) otherwise
calcM(Pnas) := 16*10^-6*Pnas/(2*π*2.33*0.9*0.9)
calcP_n(Psl, N_p, N_n, t) :=
    (Psl*f_sl + N_p + F_tr)/f_n if t > 0
    (Psl*f_sl + N_n + F_tr)/f_n otherwise
# основная функция
calc(data, t) :=
    res ← createResultMatrix(data)
    i ← 1
    while i < rows(data)
        res[i, 0] ← data[i, 0]
        res[i, 4] ← calcQn(data[i, 1], data[i, 2], t)
        res[i, 5] ← calcQsl(res[i, 4])
        res[i, 3] ← calcP_st(res[i, 5], t, res[i, 0])
        res[i, 2] ← calcP_n(res[i, 3], data[i, 1], data[i, 2], t)
        res[i, 1] ← calcP_nas(res[i, 4], res[i, 2], t)
        res[i, 6] ← calcX(res[i, 4])
        res[i, 7] ← calcT(data[:, 3], res[:, 6], i)
        res[i, 8] ← calcM(res[i, 1])
        i ← i + 1
    res
вывод
resultPos := calc(data, 50) = [
    "Angle", "Pnas", "Pn", "Psl", "Qn", "Qsl", "x'", "t", "M";
    0, 3.22668e17, 2.09475e17, 1.74782e17, 237.9, 285.121, 9962.31, 0, 4.35367e11;
    10, 6.29568e17, 4.08714e17, 3.41023e17, 332.306, 398.266, 13915.6, 0.000309909, 8.49458e11;
    30, 1.06515e18, 6.91491e17, 5.76967e17, 432.236, 518.032, 18100.3, 0.000819471, 1.43717e12;
    50, 1.39042e18, 9.02659e17, 7.53162e17, 493.844, 591.868, 20680.2, 0.0013789, 1.87606e12;
    70, 1.64943e18, 1.07081e18, 8.93462e17, 537.878, 644.642, 22524.2, 0.00196049, 2.22553e12;
    80, 1.74363e18, 1.13196e18, 9.44488e17, 553.024, 662.795, 23158.4, 0.00242382, 2.35263e12;
    85, 1.00124e20, 9.94966e19, 8.30182e19, 560.22, 671.419, 23459.8, 0.00277388, 1.35095e14;
    95, 1.05356e20, 1.04695e20, 8.7356e19, 574.67, 688.737, 24064.9, 0.00309946, 1.42154e14
]
# [component: inputs resultPos]
resultNeg := calc(data, -50) = [
    "Angle", "Pnas", "Pn", "Psl", "Qn", "Qsl", "x'", "t", "M";
    0, 4.45666e16, 3.11515e16, 2.59922e16, 64.6458, 77.4775, 2707.11, 0, 6.01324e10;
    10, 1.83287e17, 1.28116e17, 1.06897e17, 131.1, 157.123, 5489.96, 0.000902762, 2.47304e11;
    30, 3.66456e17, 2.56148e17, 2.13726e17, 185.374, 222.169, 7762.72, 0.00215542, 4.94448e11;
    50, 4.83907e17, 3.38246e17, 2.82226e17, 213.019, 255.302, 8920.4, 0.00347264, 6.52922e11;
    70, 5.83891e17, 4.08134e17, 3.40539e17, 233.993, 280.439, 9798.72, 0.00481561, 7.87828e11;
    80, 6.36326e17, 4.44785e17, 3.7112e17, 244.274, 292.761, 10229.2, 0.00584749, 8.58576e11;
    85, 2.40225e19, 2.38227e19, 1.98772e19, 249.512, 299.038, 10448.6, 0.00660444, 3.24129e13;
    95, 2.62549e19, 2.60365e19, 2.17244e19, 260.848, 312.624, 10923.3, 0.00728878, 3.5425e13
]
# [component: inputs resultNeg]
